# Вариант 515
# Параметры
# велечины с нижним индексом это  в базовых велечинах относительно ном
# G:
Pgн := 63  # МВА
cosφ := 0.8
Ugн := 10.5  # кВ
xd_н := 0.14
P0_н := 0.9
x2_н := 0.17
# Ом/км
x0/x1 := 1.9
# L
x1пог := 0.41
x0I-II/x1 := 1.1
L := 40  # км
# CL:
Ecl_н := 0.85
xcl_н := 0.35
Scl := 50
# T2, T1:
Sт1н := 125  # МВА
# |
# |
# |
# |
# |
# |
# T3:
Sт3н := 80  # МВА
# Y/D-11 | n=230/121/10,5 | n=121/10,5
uk := 11  # %
ukвс := 11  # %
ukвн := 44  # %
ukсн := 28  # %
# Y/D-11
# С:
Sgs := 6000  # МВА
xc1_н := 0.9
xc0_н := 0.99
# ------------------------------------------------------------
# Задача 1
Sб := 100  # МВА
Uб1 := 230  # кВ
Uб2 := Uб1*121/230 = 121  # кВ
Uб3 := Uб2*10.5/121 = 10.5  # кВ
Uб4 := Uб1*10.5/230 = 10.5  # кВ
Iб1 := Sб/(sqrt(3)*Uб1) = 0.251022  # кА
# Параметры
# индексы у расчетных величин 1,2,0
# прямая, обратная, нулевая соответственно
# Gs:
E1_1 := 230/Uб1 = 1  # oe
x1_1 := xc1_н*230^2/Sgs*Sб/Uб1^2 = 0.015  # oe
x1_2 := x1_1
x1_0 := xc0_н*230^2/Sgs*Sб/Uб1^2 = 0.0165  # oe
# T1:
ukv := 0.5*(ukвн + ukвс - ukсн) = 13.5
ukc := 0.5*(-ukвн + ukвс + ukсн) = -2.5
ukn := 0.5*(ukвн - ukвс + ukсн) = 30.5
x2_1 := ukv/100*230^2/Sт1н*Sб/Uб1^2 = 0.108  # oe
x4_1 := ukn/100*10.5^2/Sт1н*Sб/Uб4^2 = 0.244  # oe
x6_1 := ukc/100*121^2/Sт1н*Sб/Uб2^2 = -0.02  # oe
x2_2 := x2_1
x4_2 := x4_1
x6_2 := x6_1
x2_0 := x2_1
x4_0 := x4_1
x6_0 := x6_1
# T2:
x3_1 := x2_1
x5_1 := x4_1
x7_1 := x6_1
x3_2 := x2_1
x5_2 := x4_1
x7_2 := x6_1
x3_0 := x2_1
x5_0 := x4_1
x7_0 := x6_1
# Cl:
E2_1 := Ecl_н*10.5/Uб4 = 0.85  # oe
x8_1 := xcl_н*10.5^2/Scl*Sб/Uб4^2 = 0.7  # oe
x8_2 := x8_1
x8_0 := x8_1 = 0.7  # oe
# L1:
x9_1 := x1пог*L*Sб/Uб2^2 = 0.112014  # oe
x9_2 := x9_1
x9_0 := x9_1*x0/x1 = 0.212827  # oe
# T3:
x10_1 := uk/100*121^2/Sт3н*Sб/Uб2^2 = 0.1375  # oe
x10_2 := x10_1
x10_0 := x10_1
# T4:
x11_1 := x10_1
x11_0 := x10_1
x11_2 := x10_1
# G1:
x12_1 := xd_н*10.5^2/(Pgн/cosφ)*Sб/Uб3^2 = 0.177778  # oe
x12_2 := x2_н*10.5^2/(Pgн/cosφ)*Sб/Uб3^2 = 0.215873  # oe
E3_1 := sqrt((1 + P0_н*xd_н*sqrt(1 - cosφ^2))^2 + (P0_н*xd_н*cosφ)^2)*Ugн/Uб3 = 1.08031  # oe
# G2:
E4_1 := E3_1
x13_1 := x12_1
x13_2 := x12_2
# МУП
# Прямая посл
ORIGIN := 1
A_1 := [
    -1, 1, 1, 0, 0, 0, 0, 0, 0;
    0, -1, 0, 1, 0, 0, 1, 0, 0;
    0, 0, -1, 0, 1, 0, 0, 1, 0;
    0, 0, 0, -1, -1, -1, 0, 0, 0;
    0, 0, 0, 0, 0, 0, -1, -1, -1
]
y1_1 := 1/x1_1 = 66.6667
y6_1 := 1/x8_1 = 1.42857
y2_1 := 1/x2_1 = 9.25926
y7_1 := 1/x6_1 = -50
y3_1 := 1/x3_1 = 9.25926
y8_1 := 1/x7_1 = -50
y4_1 := 1/x4_1 = 4.09836
y9_1 := 1/(x9_1 + x10_1/2 + x12_1/2) = 3.70847
y5_1 := 1/x5_1 = 4.09836
D_1 := [
    y1_1, 0, 0, 0, 0, 0, 0, 0, 0;
    0, y2_1, 0, 0, 0, 0, 0, 0, 0;
    0, 0, y3_1, 0, 0, 0, 0, 0, 0;
    0, 0, 0, y4_1, 0, 0, 0, 0, 0;
    0, 0, 0, 0, y5_1, 0, 0, 0, 0;
    0, 0, 0, 0, 0, y6_1, 0, 0, 0;
    0, 0, 0, 0, 0, 0, y7_1, 0, 0;
    0, 0, 0, 0, 0, 0, 0, y8_1, 0;
    0, 0, 0, 0, 0, 0, 0, 0, y9_1
]
Y_1 := A_1*D_1*transpose(A_1) = [
    85.1852, -9.25926, -9.25926, 0, 0;
    -9.25926, -36.6424, 0, -4.09836, 50;
    -9.25926, 0, -36.6424, -4.09836, 50;
    0, -4.09836, -4.09836, 9.62529, 0;
    0, 50, 50, 0, -96.2915
]
Jp'_1 := [E1_1*y1_1; 0; 0; E2_1*y6_1; E3_1*y9_1] = [66.6667; 0; 0; 1.21429; 4.00631]
φ' := Y_1^-1*Jp'_1 = [1.00141; 1.00648; 1.00648; 0.983259; 1.00364]
Y_1^-1 = [
    0.0141552, 0.0111137, 0.0111137, 0.00946425, 0.0115418;
    0.0111137, 0.0374778, 0.0647686, 0.0435356, 0.0530921;
    0.0111137, 0.0647686, 0.0374778, 0.0435356, 0.0530921;
    0.00946425, 0.0435356, 0.0435356, 0.140967, 0.0452123;
    0.0115418, 0.0530921, 0.0530921, 0.0452123, 0.0447517
]
E_экв := φ'[1] = 1.00141  # к первому узлу
x_1экв := (Y_1^-1)[1, 1] = 0.0141552
# Проверка результатов эквивалентными преобр
E23 := (E2_1*(x6_1/2 + x9_1 + (x10_1 + x12_1)/2) + E3_1*(x4_1/2 + x8_1))/(x6_1/2 + x9_1 + (x10_1 + x12_1)/2 + (x4_1/2 + x8_1)) = 1.02503
x23 := (x6_1/2 + x9_1 + (x10_1 + x12_1)/2)*(x4_1/2 + x8_1)/(x6_1/2 + x9_1 + (x10_1 + x12_1)/2 + (x4_1/2 + x8_1)) = 0.197323
Ee := (E1_1*(x2_1/2 + x23) + E23*x1_1)/(x2_1/2 + x23 + x1_1) = 1.00141
E_экв = 1.00141
x_1экв = 0.0141552
xe := (x2_1/2 + x23)*x1_1/((x2_1/2 + x23) + x1_1) = 0.0141552
# все верно
# Обратная последовательность
A_2 := [
    -1, 1, 1, 0, 0, 0, 0, 0, 0;
    0, -1, 0, 1, 0, 0, 1, 0, 0;
    0, 0, -1, 0, 1, 0, 0, 1, 0;
    0, 0, 0, -1, -1, -1, 0, 0, 0;
    0, 0, 0, 0, 0, 0, -1, -1, -1
]
y1_2 := 1/x1_2 = 66.6667
y6_2 := 1/x8_2 = 1.42857
y2_2 := 1/x2_2 = 9.25926
y7_2 := 1/x6_2 = -50
y3_2 := 1/x3_2 = 9.25926
y8_2 := 1/x7_2 = -50
y4_2 := 1/x4_2 = 4.09836
y9_2 := 1/(x9_2 + x10_2/2 + x12_2/2) = 3.46379
y5_2 := 1/x5_2 = 4.09836
D_2 := [
    y1_2, 0, 0, 0, 0, 0, 0, 0, 0;
    0, y2_2, 0, 0, 0, 0, 0, 0, 0;
    0, 0, y3_2, 0, 0, 0, 0, 0, 0;
    0, 0, 0, y4_2, 0, 0, 0, 0, 0;
    0, 0, 0, 0, y5_2, 0, 0, 0, 0;
    0, 0, 0, 0, 0, y6_2, 0, 0, 0;
    0, 0, 0, 0, 0, 0, y7_2, 0, 0;
    0, 0, 0, 0, 0, 0, 0, y8_2, 0;
    0, 0, 0, 0, 0, 0, 0, 0, y9_2
]
Y_2 := A_2*D_2*transpose(A_2)
Y_2^-1 = [
    0.0141881, 0.0112653, 0.0112653, 0.00959335, 0.0116695;
    0.0112653, 0.0381751, 0.0654659, 0.0441294, 0.0536799;
    0.0112653, 0.0654659, 0.0381751, 0.0441294, 0.0536799;
    0.00959335, 0.0441294, 0.0441294, 0.141473, 0.0457128;
    0.0116695, 0.0536799, 0.0536799, 0.0457128, 0.0452471
]
x_2экв := (Y_2^-1)[1, 1] = 0.0141881
# Нулевая последовательность
A_0 := [
    -1, 1, 1, 0, 0, 0, 0, 0;
    0, -1, 0, 1, 0, 1, 0, 0;
    0, 0, -1, 0, 1, 0, -1, 0;
    0, 0, 0, 0, 0, 1, 1, -1
]
y1_0 := 1/x1_0 = 60.6061
y5_0 := 1/x5_0 = 4.09836
y6_0 := 1/x6_0 = -50
y2_0 := 1/x2_0 = 9.25926
y3_0 := 1/x3_0 = 9.25926
y7_0 := 1/x7_0 = -50
y4_0 := 1/x4_0 = 4.09836
y8_0 := 1/(x9_0 + x10_0/2) = 3.55143
D_0 := [
    y1_0, 0, 0, 0, 0, 0, 0, 0;
    0, y2_0, 0, 0, 0, 0, 0, 0;
    0, 0, y3_0, 0, 0, 0, 0, 0;
    0, 0, 0, y4_0, 0, 0, 0, 0;
    0, 0, 0, 0, y5_0, 0, 0, 0;
    0, 0, 0, 0, 0, y6_0, 0, 0;
    0, 0, 0, 0, 0, 0, y7_0, 0;
    0, 0, 0, 0, 0, 0, 0, y8_0
]
Y_0 := A_0*D_0*transpose(A_0)
Y_0^-1 = [
    0.0119326, -0.00301528, -0.00301528, 0;
    -0.00301528, 0.020014, -0.045781, -0.0341089;
    -0.00301528, -0.045781, 0.020014, 0.0341089;
    0, -0.0341089, 0.0341089, 0.0249966
]
x_0экв := (Y_0^-1)[1, 1] = 0.0119326
x_1экв = 0.0141552
Ika1 := E_экв/(x_1экв + x_2экв*x_0экв/(x_2экв + x_0экв)) = 48.5258  # oe
x_2экв = 0.0141881
x_0экв = 0.0119326
m_1.1 := sqrt(3)*sqrt(1 - x_2экв*x_0экв/(x_2экв + x_0экв)^2) = 1.50186
I_k1.1 := m_1.1*Ika1*Iб1 = 18.2942  # кА
# 18.29
# нужно найти симетричные сост
Ika0 := -Ika1*x_2экв/(x_0экв + x_2экв) = -26.358  # oe
Ika2 := -Ika1*x_0экв/(x_0экв + x_2экв) = -22.1678  # oe
Uka1 := E_экв - Ika1*x_1экв = 0.314519  # oe
Uka2 := -Ika2*x_2экв = 0.314519  # oe
Uka0 := -Ika0*x_0экв = 0.314519  # oe
# перепроверить
# потенциалы узлов жля ПП
Jp_1 := [E1_1*y1_1 - Ika1; 0; 0; E2_1*y6_1; E3_1*y9_1] = [18.1409; 0; 0; 1.21429; 4.00631]
φ_1 := lsolve(Y_1, Jp_1) = [0.314519; 0.467181; 0.467181; 0.523998; 0.443567]  # oe
# потенциалы узлов жля ОП
Jp_2 := [-Ika2; 0; 0; 0; 0] = [22.1678; 0; 0; 0; 0]
φ_2 := lsolve(Y_2, Jp_2) = [0.314519; 0.249728; 0.249728; 0.212663; 0.258688]  # oe
# потенциалы узлов жля НП
Jp_0 := [-Ika0; 0; 0; 0] = [26.358; 0; 0; 0]  # oe
φ_0 := lsolve(Y_0, Jp_0) = [0.314519; -0.0794767; -0.0794767; 0]  # oe
# Расчет токов в точке L1
Il1_1 := (φ_1[5] - E3_1)/(x10_1/2 + x12_1/2 + x9_1) = -2.36135  # oe
Il1_2 := φ_2[5]/(x10_2/2 + x12_2/2 + x9_2) = 0.896042  # oe
Il1_0 := φ_0[4]/(x10_0/2 + x9_0) = -5.37948e-17  # oe
Y''_0 := [y2_0 + y4_0 + y6_0, 0, -y6_0; 0, y3_0 + y5_0 + y7_0, -y7_0; -y6_0, -y7_0, y6_0 + y7_0 + y8_0] = [-36.6424, 0, 50; 0, -36.6424, 50; 50, 50, -96.4486]
# ПРОВЕРИТЬ
J''_0 := [Uka0*y2_0; Uka0*y3_0; 0] = [2.91222; 2.91222; 0]
φ''_0 := lsolve(Y''_0, J''_0) = [0.191609; 0.191609; 0.198665]
# Напряжение в точке М4
kt_1 := cos(30*π/180) + 1j*sin(30*π/180) = 0.866025 + 0.5j
kt_2 := conj(kt_1) = 0.866025 - 0.5j
a := cos(120*π/180) + 1j*sin(120*π/180) = -0.5 + 0.866025j
a^2 = -0.5 - 0.866025j
# Фаза А
Um4_a := 1j*kt_1*φ_1[4] + 1j*kt_2*φ_2[4] = -0.155667 + 0.637968j  # oe
|Um4_a| = 0.656685
arg(Um4_a)/deg = 103.713
Um4_b := 1j*(kt_1*φ_1[4]*a^2 + a*kt_2*φ_2[4]) = 0.311335  # oe
Um4_c := 1j*(kt_1*φ_1[4]*a + a^2*kt_2*φ_2[4]) = -0.155667 - 0.637968j  # oe
|Um4_c| = 0.656685
arg(Um4_c)/deg = -103.713
|Um4_c|
z
