pp(z) := concat(" |z| = ", num2str(|z|), "∠", num2str(arg(z)/deg), "° ")
a := 1*e^(1j*deg*120) = -0.5 + 0.866025i
# проверка того как решает waves
Ib := 1249.5*e^(1j*deg*(-56.88)) = 682.72 - 1046.49i
1249.5/3 = 416.5
I1 := 1/3*(a*Ib) explicit, ALL → 1/3*(682.719736244 - 1046.49128603i)*(-0.5 + 0.866025403784i) = 188.309 + 371.499i
I2 := 1/3*a^2*Ib = -415.883 - 22.669i
I0 := 1/3*Ib = 227.573 - 348.83i
ii := (I1 - I2*e^(1j*deg*55))*a explicit, ALL → (-0.5 + 0.866025403784i)*(188.30939014 + 371.49942609i - (-415.882635555 - 22.6689974121i)*e^(1i*deg*55)) = -832.158 - 9.00517i
f := 3 + 4j = 3 + 4i
|f| explicit, ALL → |3 + 4i| = 5
b := e^(1j*deg*30) = 0.866025 + 0.5i
