pp(z) := concat(" |z| = ", num2str(|z|), "∠", num2str(arg(z)/deg), "° ")
a := 1*e^(1j*deg*120) = -0.5 + 0.866025i
# проверка того как решает waves
Ib := 1249.5*e^(1j*deg*(-56.88)) = 682.72 - 1046.49i
1249.5/3 = 416.5
I1 := 1/3*(a*Ib) = 188.309 + 371.499i
pp(I1) = " |z| = 416.5∠63.12° "
I2 := 1/3*a^2*Ib = -415.883 - 22.669i
pp(I2) = " |z| = 416.5∠-176.88° "
I0 := 1/3*Ib = 227.573 - 348.83i
pp(I0) = " |z| = 416.5∠-56.88° "
ii := (I1 - I2*e^(1j*deg*55))*a explicit, ALL → (-0.5 + 0.866025403784i)*(188.30939014 + 371.49942609i - (-415.882635555 - 22.6689974121i)*e^(1i*deg*55)) = -832.158 - 9.00517i
pp(ii) = " |z| = 832.207168577687∠-179.38° "
f := 3 + 4j = 3 + 4i
pp(f) = " |z| = 5∠53.130102354156° "
b := e^(1j*deg*30) = 0.866025 + 0.5i
