u_baz := 10.5
X_баз := u_baz^2/80 explicit, ALL → 10.5^2/80 = 1.37813
X_баз.2 := X_баз = 1.37813
x_baz := u_baz^2/80 = 1.37813
I_baz := 80/(sqrt(3)*10.5) = 4.39886
z_c' := 14*80/115^2 = 0.0846881
fi_zc := 80
r_c' := z_c'*cos(fi_zc*π/180) = 0.0147059
x_c' := z_c'*sin(fi_zc*π/180) = 0.0834015
r_tr' := 310*10^-3/80 = 0.003875
z_tr' := 10.5/100 = 0.105
x_tr' := sqrt(z_tr'^2 - r_tr'^2) = 0.104928
dP_xx := 70*10^-3/80 = 0.000875
r_l := 0.0178*2/x_baz = 0.0258322
x_l := 0.314*2/x_baz = 0.455692
P_n := 15/80 = 0.1875
Q_n := 9/80 = 0.1125
S_n := sqrt(P_n^2 + Q_n^2) = 0.218661
dS_nagr := 1j*10.5/100*(2*S_n)^2/1^2 + 310*10^-3/80*(2*S_n)^2/1^2 = 0.000741094 + 0.0200812i
dS_tr := dS_nagr + dP_xx = 0.00161609 + 0.0200812i
S_s := 2*dS_tr + 4*(P_n + 1j*Q_n) = 0.753232 + 0.490163i
Q_s := Im(S_s) = 0.490163
P_s := Re(S_s) = 0.753232
U_vn := 1 - Q_s*x_c'/1 - 1j*P_s*x_c'/1 = 0.95912 - 0.0628207i
|U_vn| = 0.961175
|U_vn|*u_baz = 10.0923
U_nn := U_vn - (P_s*r_tr' + Q_s*x_tr')/(2*U_vn) - 1j*(P_s*x_tr' - Q_s*r_tr')/(2*U_vn) = 0.93353 - 0.104709i
|U_nn| = 0.939384
|U_vn|*u_baz = 10.0923
U_n := U_nn - (P_n*r_l + Q_n*x_l)/U_nn - 1j*(P_n*x_l - Q_n*r_l)/U_nn = 0.883966 - 0.198681i
|U_n| = 0.906019
|U_n|*u_baz = 9.5132
# хз почему такая херня с напряжениями, сопротивление фигня
dU_nn'' := (P_s*r_tr' + Q_s*x_tr')/(2*|U_vn|) = 0.0282731
r_tr' = 0.003875
ddU_nn'' := (P_s*x_tr' - Q_s*r_tr')/(2*|U_vn|) = 0.040126
x_tr' = 0.104928
U_nn'' := sqrt((|U_vn| - dU_nn)^2 + ddU_nn^2)  # error: Эта переменная не определена.
x_l = 0.455692
P_n = 0.1875
dU_n'' := (P_n*r_l + Q_n*x_l)/U_nn'  # error: Эта переменная не определена.
Q_n = 0.1125
r_l = 0.0258322
ddU_n'' := (P_n*x_l - Q_n*r_l)/U_nn'  # error: Эта переменная не определена.
U_n'' := sqrt((U_nn' - dU_n)^2 + ddU_n^2)  # error: Эта переменная не определена.
I_n := conj(P_n + 1j*Q_n)/(sqrt(3)*conj(U_n)) = 0.100853 - 0.0961457i
|I_n| = 0.139339
I_baz*|I_n| = 0.612933
2*I_n = 0.201707 - 0.192291i
|2*I_n| = 0.278678
|2*I_n|*I_baz = 1.22587
4*I_n = 0.403413 - 0.384583i
|4*I_n| = 0.557356
|4*I_n|*I_baz = 2.45173
n := 100/1.78*(|U_nn|/1 - 1) = -3.40542
U_nn'.b := |U_nn|*(1 - (-4*1.78/100/(1 - 4*1.78/100))) = 1.01139
U_nn' := U_nn*U_nn'.b/|U_nn| = 1.00509 - 0.112735i
|U_nn'|*u_baz = 10.6196
U_n' := U_nn' - (P_n*r_l + Q_n*x_l)/U_nn' - 1j*(P_n*x_l - Q_n*r_l)/U_nn' = 0.959057 - 0.200017i
|U_n'| = 0.979693
u_baz*|U_n'| = 10.2868
I_n' := conj(P_n + 1j*Q_n)/(sqrt(3)*conj(U_n')) = 0.094634 - 0.0874612i
|I_n'| = 0.128861
I_baz*|I_n'| = 0.56684
2*I_n' = 0.189268 - 0.174922i
|2*I_n'| = 0.257721
I_baz*|2*I_n'| = 1.13368
4*I_n' = 0.378536 - 0.349845i
|4*I_n'| = 0.515442
I_baz*|4*I_n'| = 2.26736
# расчет токов кз релейки
I_k3max := 10.5/(sqrt(3)*(x_c' + x_tr' + x_l)*x_baz) = 6.8303
k_ots := 1.2
k_v := 0.87
k_z := 2
k_ots' := 1.1
I_1.sz := k_ots*I_k3max = 8.19636
I_3sz := k_ots*k_z/k_v*(I_baz*|I_n'|)*1.2 = 1.87643
I_sz.hsv := k_ots*k_z/k_v*(I_baz*|I_n'|)*1.2*2 = 3.75287
I_sz.vv1 := k_ots/k_v*(k_z*I_baz*|I_n'|*1.2*2 + k_ots'*I_baz*|I_n'|*1.2*2) = 5.81695
I_sz.vv2 := k_ots*(I_sz.hsv + (I_baz*|I_n'|)*1.2*4) = 7.76844
I_kz.min := 0.9*10.5/(sqrt(3)*(x_c' + x_tr')*x_baz) = 21.0215
I_kz.min/I_sz.vv2 = 2.70601
I_sz.tr := k_ots*(I_baz*|I_n'|*1.2*2 + k_z*I_baz*|I_n'|*1.2*2)/k_v = 5.6293
I_sz.tr2 := k_ots*k_z/k_v*(|I_n'|*1.2*I_baz*2) = 3.75287
# расчет аркт
U_baz := 10.5/sqrt(3) = 6.06218
dU_nch := 1.25*0.0178 = 0.02225
dU_nch*U_baz = 0.134883
z_l := sqrt(r_l^2 + x_l^2) = 0.456423
2*|I_n| = 0.278678
U_zel := 1 + z_l*2*|I_n| = 1.1272
x_baz = 1.37813
0.7*U_zel = 0.789037
0.7*U_zel*U_baz = 4.78328
0.2*U_zel = 0.225439
0.2*U_zel*U_baz = 1.36665
k_tr0 := 115/10.5 = 10.9524
115/(k_tr0*10) = 1.05
1/(x_baz*k_tr0^2) = 0.00604915
n_0 := (115 - 10*k_tr0)/(1.78/100*10*k_tr0) = 2.80899
1.05/(1 + 3*0.0178) = 0.996772
sqrt(3)*(1/(x_baz*k_tr0^2)/(1 + 3*0.0178)^2 + 0.105*(1 + 3*0.0178)^2) = 0.211249
# характеристика аркт
U_z(n, I) := 1.05/(1 + n*0.0178) - sqrt(3)*I*(1/(x_baz*k_tr0^2)/(1 + n*0.0178)^2 + 0.105*(1 + n*0.0178)^2)
I_1(n) := (-(1 + 0.5*dU_nch) + 1.05/(1 + n*0.0178))/(sqrt(3)*(1/(x_baz*k_tr0^2)/(1 + n*0.0178)^2 + 0.105*(1 + n*0.0178)^2))
I_1(2) = 0.0135732
I_1' := I_1(3)*80/(sqrt(3)*10) = -0.31381
U_z(3, 0) = 0.996772
